# OpenSim document version 40600
Model rehab_lower_limb_skeleton_live_link:
  PhysicalOffsetFrame femur_r_imu: socket_parent=/bodyset/femur_r translation=(0 -0.15 0) [meters]
  PhysicalOffsetFrame tibia_r_imu: socket_parent=/bodyset/tibia_r translation=(0 -0.15 0)
  Ground
  BodySet:
    Body pelvis: mass=10 [kg] mass_center=(0 0 0) inertia=(0.1 0.1 0.1 0 0 0)
        meshes=(r_pelvis.vtp l_pelvis.vtp sacrum.vtp)
    Body femur_r: mass=8 mass_center=(0 0 0) inertia=(0.01 0.01 0.01 0 0 0) meshes=femur_r.vtp
    Body tibia_r: mass=4 mass_center=(0 0 0) inertia=(0.01 0.01 0.01 0 0 0)
        meshes=(tibia_r.vtp r_fibula.vtp r_patella.vtp)
  JointSet:
    WeldJoint pelvis_ground: socket_parent_frame=ground_offset socket_child_frame=pelvis_offset
      PhysicalOffsetFrame ground_offset: socket_parent=/ground translation=(0 1 0)
      PhysicalOffsetFrame pelvis_offset: socket_parent=/bodyset/pelvis translation=(0 0 0)
    BallJoint hip_r: socket_parent_frame=pelvis_offset socket_child_frame=femur_r_offset
      Coordinate hip_flexion_r
      Coordinate hip_adduction_r
      Coordinate hip_rotation_r
      PhysicalOffsetFrame pelvis_offset: socket_parent=/bodyset/pelvis translation=(-0.056276 -0.07849 0.07726)
      PhysicalOffsetFrame femur_r_offset: socket_parent=/bodyset/femur_r translation=(0 0 0)
    PinJoint knee_r: socket_parent_frame=femur_r_offset socket_child_frame=tibia_r_offset
      Coordinate knee_angle_r: range=(-2.0944 2.0944)
      PhysicalOffsetFrame femur_r_offset: socket_parent=/bodyset/femur_r translation=(-0.00809 -0.40796 -0.00275)
      PhysicalOffsetFrame tibia_r_offset: socket_parent=/bodyset/tibia_r translation=(-0.00809 -0.003535 -0.001485)
